t := 1*10^-3
A := 56
B := 269
C := -324
I_ф := 0  # А
ψ := 0
ϕ := 1
ω := 2*π*50 = 314.159
Given
sqrt(2)*I_ф*(sin(ω*t + (ψ - ϕ)*π/180) - sin((ψ - ϕ)*π/180)*e^(-t*ω/tan(ϕ*π/180))) == A
sqrt(2)*I_ф*(sin(ω*t + (ψ - ϕ + 120)*π/180) - sin((ψ - ϕ + 120)*π/180)*e^(-t*ω/tan(ϕ*π/180))) == B
sqrt(2)*I_ф*(sin(ω*t + (ψ - ϕ - 120)*π/180) - sin((ψ - ϕ - 120)*π/180)*e^(-t*ω/tan(ϕ*π/180))) == C
ψ > 0*π/180
ϕ > 0
[I_ф; ψ; ϕ] := Minerr(I_ф, ψ, ϕ)
[I_ф; ψ; ϕ] = [758.006; -4.37609e-5; 63.5138]
I_ф = 758.006
ψ = -4.37609e-5
ϕ = 63.5138
